f(x) := x^2 + (x - 2)*sin(x) - 5
# [plot: f(x) vs x]
# Первый корень
x := -2
x1 := root(f(x), x)
x1 = -1.32936
# Второй корень
x := 2
x2 := root(f(x), x)
x2 = 2.19967
# Проверка
f(x1) = 1.1382e-11
f(x2) = 3.52607e-13
