n := 5
A := [n, n + 1, n + 2; n - 3, n - 2, n; n - 1, n, n + 1] = [5, 6, 7; 2, 3, 5; 4, 5, 6]
B := [6*n + 8; 6*n - 7; 6*n + 2] = [38; 23; 32]
X := A^-1*B = [1; 2; 3]
A*X = [38; 23; 32]
x := X[0]
y := X[1]
z := X[2]
x = 1
y = 2
z = 3
x := -10
y := 10
Given
n*x + (n + 1)*y + (n + 2)*z == 6*n + 8
(n - 3)*x + (n - 2)*y + n*z == 6*n - 7
(n - 1)*x + n*y + (n + 1)*z == 6*n + 2
Find(x, y) =  # error: This function is misplaced. Move it to a solve block with one solve block function only.
