f(x) := x*sin(x)
x := 0, 1 .. 12
# [plot: f(x) vs x]
x := 5
x1 := Minimize(f, x)
x1 = 4.91318
f(x1) = -4.81447
x := 10
x2 := Minimize(f, x)
x2 = 11.0855
f(x2) = -11.0407
x := 2
x3 := Maximize(f, x)
x3 = 2.02876
f(3) = 0.42336
x := 8
x3 := Maximize(f, x)
x3 = 7.97867
f(3) = 0.42336
