x := 7
y := 10
z := -3
p :=
    if x > y
        sin(x) + 3*|y| - z^2
    else if x ≤ y
        (y + 3)/sqrt(z^2 + 1)*ln*|x + 1|
p = 11.3093
q :=
    if (x > y)*(x < 1)
        cos(x) + 2*|y + 1| - z
    else
        (x*y + 3)/sqrt(y^2 + 5)
q = 7.12407
w :=
    if (x < y)*{
    (y ≥ 10)
}
        x^2 + 2*(y*x + 1) - z
    else
        (x^-3*y^2 + 3)*sqrt(z^2 + 7)
w = 194
