x := -2, -1.6 .. 2
x = [-2; -1.6; -1.2; -0.8; -0.4; 0; 0.4; 0.8; 1.2; 1.6; 2]
f(x, n) := (x^2 - n*x + sin(x))*sqrt(|x - cos(n*x)|)
f(x, 6) = [25.4486; 8.75444; 10.3653; 4.44907; 1.2608; 0; -1.97362; -2.90593; -3.7136; -9.71117; -7.62422]
