round_Vec1 := round(runif(3, -9, 9), 0)
round_Vec2 := round(runif(3, -9, 9), 0)
round_Vec3 := round(runif(3, -9, 9), 0)
A := round_Vec1
B := round_Vec2
C := round_Vec3
A = [3; 0; 3]
B = [3; 6; 7]
C = [8; 4; -2]
s := A*B = 30
V := B×C = [-40; 62; -36]
w := (A×B)*C = -228
long_A := |A| = 4.24264
long_B := |B| = 9.69536
long_C := |C| = 9.16515
matrix :=
    for i ∈ 0, 1 .. 9
        for j ∈ 0, 1 .. 9
            matrix[i, j] ← round(runif(1, -10, 10)[0.0], 0)
        matrix
matrix = [
    3, -2, -8, -3, 6, -6, 6, 5, -2, 0;
    -4, 8, 6, -2, 1, 9, 0, -9, -1, -5;
    2, 9, -2, 3, 6, -3, -8, -3, -3, 8;
    -1, 5, -3, -7, -8, -2, 5, 0, -8, -6;
    9, 7, 1, -1, -9, -9, -6, -6, 7, 1;
    6, -9, -7, -7, 8, -5, -8, -8, 10, 7;
    6, 7, -9, -6, 4, -2, 6, -3, 3, 2;
    -5, 1, 1, -1, 3, -6, 0, 3, 9, -1;
    6, -3, -10, -4, -4, 8, 0, 6, 5, 4;
    -5, 10, -3, -5, -1, 1, -6, -2, -9, 10
]
Sum :=
    Sum ← 0
    for i ∈ 0, 1 .. 9
        for j ∈ 0, 1 .. 9
            Sum ← Sum + matrix[i, j]
    = -23
SumPos :=
    SumPo ← 0
    for i ∈ 0, 1 .. 9
        for j ∈ 0, 1 .. 9
            if matrix[i, j] > 0
                SumPos ← SumPos + matrix[i, j]
    = 233
SumNeg :=
    SumNeg ← 0
    for i ∈ 0, 1 .. 9
        for j ∈ 0, 1 .. 9
            if matrix[i, j] < 0
                SumNeg ← SumNeg + matrix[i, j]
    = -256
prz :=
    prz ← 0
    for i ∈ 0, 1 .. 9
        prz ← prz + (matrix[i, 0]*matrix[9, i])
    = -189
