g(x) := sqrt(|x|)*sin(x)
x := -2*π, -2*π + π/4 .. 2*π
Y := [
    6.139*10^-16;
    1.658;
    2.171;
    1.401;
    -2.171*10^-16;
    -1.085;
    -1.253;
    -0.627;
    0;
    0.627;
    1.253;
    1.085;
    2.171*10^-16;
    -1.401;
    -2.171;
    -1.658;
    -6.139*10^-16
]
X := [-6.283; -5.498; -4.712; -3.927; -3.142; -2.356; -1.571; -0.785; 0; 0.785; 1.571; 2.356; 3.142; 3.927; 4.712; 5.498; 6.283]
g(x) = [0; 1.65798; 2.1708; 1.40125; 0; -1.0854; -1.25331; -0.626657; 0; 0.626657; 1.25331; 1.0854; 0; -1.40125; -2.1708; -1.65798; 0]
a := WRITETEXT(".\X.txt", X)
b := WRITETEXT(".\Y.txt", Y)
XX := READTEXT(".\X.txt") = [-6.283; -5.498; -4.712; -3.927; -3.142; -2.356; -1.571; -0.785; 0; 0.785; 1.571; 2.356; 3.142; 3.927; 4.712; 5.498; 6.283]
YY := READTEXT(".\Y.txt") = [0; 1.658; 2.171; 1.401; 0; -1.085; -1.253; -0.627; 0; 0.627; 1.253; 1.085; 0; -1.401; -2.171; -1.658; 0]
# [plot: YY vs XX]
x = [-6.28319; -5.49779; -4.71239; -3.92699; -3.14159; -2.35619; -1.5708; -0.785398; 0; 0.785398; 1.5708; 2.35619; 3.14159; 3.92699; 4.71239; 5.49779; 6.28319]
