n := 5
x := 1
y := 2
z := 3
Given
n*x + (n + 1)*y + (n + 2) == (6*n) + 8
(n - 3)*x + (n - 2)*y + n*z == 6*n - 7
(n - 1)*x + n*y + (n + 1)*z == 6*n + 2
A := Find(x, y, z)
A = [-6.53846; 10.6154; 0.846154]
first(x, y) := n*x + (n + 1)*y + (n + 2)
second(x, y, z) := (n - 3)*x + (n - 2)*y + n*z
third(x, y, z) := (n - 1)*x + n*y + (n + 1)*z
first(A[0], A[1]) = 38
second(A[0], A[1], A[2]) = 23
third(A[0], A[1], A[2]) = 32
