Xa := -2
Xb := -3
Xc := 0
Xd := 3
Xe := 2
Xf := -2
Xh := 2
Ya := -4
Yb := 0
Yc := 4
Yd := 0
Ye := -4
Yf := 0
Yh := 0
xlw := 100
ylw := 200
xhw := 400
yhw := 500
Zx := transpose([Xa, Xb, Xc, Xd, Xe, Xf, Xh])
Zy := transpose([Ya, Yb, Yc, Yd, Ye, Yf, Yh])
xl := min(Zx) = -3
xh := max(Zx) = 3
yl := min(Zy) = -4
yh := max(Zy) = 4
# Вычесляем параметры, необходимые для формирования матрицы пересчета координат из МСК в ОСК
ΔXw := xhw - xlw = 300
ΔX := xh - xl = 6
ΔYw := yhw - ylw = 300
ΔY := yh - yl = 8
Kx := ΔXw/ΔX = 50
Ky := ΔYw/ΔY = 37.5
# Матрица пересчета из МСК в ОСК
Tsw := [Kx, 0, xlw - Kx*xl; 0, -Ky, yhw + Ky*yl; 0, 0, 1]
# Вычесляем координаты вершин в ОСК
[Xaw; Yaw; q] := Tsw*[Xa; Ya; 1] = [150; 500; 1]
[Xbw; Ybw; q] := Tsw*[Xb; Yb; 1] = [100; 350; 1]
[Xcw; Ycw; q] := Tsw*[Xc; Yc; 1] = [250; 200; 1]
[Xdw; Ydw; q] := Tsw*[Xd; Yd; 1] = [400; 350; 1]
[Xew; Yew; q] := Tsw*[Xe; Ye; 1] = [350; 500; 1]
[Xfw; Yfw; q] := Tsw*[Xf; Yf; 1] = [150; 350; 1]
[Xhw; Yhw; q] := Tsw*[Xh; Yh; 1] = [350; 350; 1]
X := transpose([Xb, Xc, Xd, Xb, Xf, Xa, Xe, Xh, Xd])
Y := transpose([Yb, Yc, Yd, Yb, Yf, Ya, Ye, Yh, Yd])
Xw := transpose([Xbw, Xcw, Xdw, Xbw, Xfw, Xaw, Xew, Xhw, Xdw])
Yw := transpose([Ybw, Ycw, Ydw, Ybw, Yfw, Yaw, Yew, Yhw, Ydw])
# [plot: Y vs X]
# [plot: -Yw vs Xw]
