f(x) := sin(x*π)*sqrt(|x|)
x1 := -6
x2 := 6
ΔX := 0.1
# Область отображения в окне
Xlw := 100
Ylw := 200
Xhw := 800
Yhw := 900
N := round((x2 - x1)/ΔX) = 120
i := 0 .. N
X[i] := x1 + i*ΔX
Y[i] := f(X[i])
Z[i] := 1
# Область отображения в мировой системе координат
Xl := min(X) = -6
Xh := max(X) = 6
Yl := min(Y) = -2.34521
Yh := max(Y) = 2.34521
M := stack(transpose(X), transpose(Y), transpose(Z))
ΔXw := Xhw - Xlw = 700
Δx := Xh - Xl = 12
ΔYw := Yhw - Ylw = 700
Δy := Yh - Yl = 4.69042
kx := ΔXw/Δx = 58.3333
ky := ΔYw/Δy = 149.241
# Матрица пересчета из МСК в ОСК
Tsw := [kx, 0, Xlw - kx*Xl; 0, -kx, Yhw + ky*Yl; 0, 0, 1]
Mw := Tsw*M
Xw := transpose(Mw)[:, 0]
Yw := transpose(Mw)[:, 1]
# [plot: f(x) vs x]
# [plot: -Yw vs Xw]
