# 1. Найдем уравнения прямых, включающих отрезки BC, AD
# B(4,8) и C(6,7) | A(4,2) и D(6,3)
x1 := 4
x2 := 6
x3 := 4
x4 := 6
y1 := 8
y2 := 7
y3 := 2
y4 := 3
a1 := (y2 - y1)/(x2 - x1) = -0.5
a2 := (y4 - y3)/(x4 - x3) = 0.5
b1 := y1 - a1*x1 = 10
b2 := -y3 + a2*x3 = 0
f1(x) := a1*x + b1
f2(x) := a2*x + b2
# 2. Найдем точку P пересечения прямых BC, AD
w := 1
f(w) := f1(w) - f2(w)
x0 := root(f(w), w) = 10
y0 := f2(x0) = 5
# (10, 5) - Координаты точки P в МСК
P := [4, 6, 4, 6; 8, 7, 2, 3; 1, 1, 1, 1]  # - Матрица координат
ϕ := 90
ϕ_rad := ϕ*π/180 = 1.5708
Rs(ϕ) := [cos(ϕ), sin(ϕ), 0; -sin(ϕ), cos(ϕ), 0; 0, 0, 1]  # - поворот системы координат на угол 90
Ts(Δx, Δy) := [1, 0, -Δx; 0, 1, -Δy; 0, 0, 1]  # - матрица для смещения начала СК
A1 := Ts(x0, y0)*P = [-6, -4, -6, -4; 3, 2, -3, -2; 1, 1, 1, 1]  # - смещаем систему координат в точку P
# - поворачиваем систему координат на угол 90
A2 := Rs(ϕ_rad)*A1 = [3, 2, -3, -2; 6, 4, 6, 4; 1, 1, 1, 1]
# - смещаем систему координат в исходное положение
A3 := Ts(-x0, -y0)*A2 = [13, 12, 7, 8; 11, 9, 11, 9; 1, 1, 1, 1]
X_NEW := [A3(0, 0), A3(0, 2), A3(0, 0), A3(0, 1); A3(0, 1), A3(0, 3), A3(0, 2), A3(0, 3)]
X := [7, 13, 4, 4; 10, 10, 10, 10]
Y_NEW := [A3(1, 0), A3(1, 2), A3(1, 0), A3(1, 1); A3(1, 1), A3(1, 3), A3(1, 2), A3(1, 3)]
Y := [11, 11, 8, 2; 5, 5, 5, 5]
X_OLD := [4, 4, 4, 6; 6, 6, 4, 6]
X := [8, 12, 6, 6; 10, 10, 10, 10]
Y_OLD := [8, 2, 8, 7; 7, 3, 2, 3]
Y := [9, 9, 7, 3; 5, 5, 5, 5]
# [plot: Y_OLD, Y_NEW, Y, y0 vs X_OLD, X_NEW, X, x0]
