# Координаты вершин пирамиды (C, B, A, C1, B1, A1), параметры положения камеры:
PIR := [0, 0, 3, 0, 0, 1; 3, 0, 0, 1, 0, 0; 0, 0, 0, 6, 6, 6; 1, 1, 1, 1, 1, 1]
PV := [10; 315; 45]
pC := submatrix(PIR, 0, 2, 0, 0) = [0; 3; 0]
pC1 := submatrix(PIR, 0, 2, 3, 3) = [0; 1; 6]
pB := submatrix(PIR, 0, 2, 1, 1) = [0; 0; 0]
pB1 := submatrix(PIR, 0, 2, 4, 4) = [0; 0; 6]
pA := submatrix(PIR, 0, 2, 2, 2) = [3; 0; 0]
pA1 := submatrix(PIR, 0, 2, 5, 5) = [1; 0; 6]
# Сферические координаты точки наблюдения:
rV := PV[0] = 10
ϕV := (PV[1]*π)/180 = 5.49779
θV := (PV[2]*π)/180 = 0.785398
# Матрица пересчета МСК в ВСК
Kview := [
    -sin(ϕV), cos(ϕV), 0, 0;
    -cos(θV)*cos(ϕV), -cos(θV)*sin(ϕV), sin(θV), 0;
    -sin(θV)*cos(ϕV), -sin(θV)*sin(ϕV), -cos(θV), rV;
    0, 0, 0, 1
]
Kview = [0.707107, 0.707107, 0, 0; -0.5, 0.5, 0.707107, 0; -0.5, 0.5, -0.707107, 10; 0, 0, 0, 1]
# Вычисляем координаты вершин пирамиды в ВСК
PIR_V := Kview*PIR = [
    2.12132, 0, 2.12132, 0.707107, 0, 0.707107;
    1.5, 0, -1.5, 4.74264, 4.24264, 3.74264;
    11.5, 10, 8.5, 6.25736, 5.75736, 5.25736;
    1, 1, 1, 1, 1, 1
]
# Определяем координаты проекции вершин пирамиды на картинную плоскость (без координат по оси Z)
P_XY := stack(transpose(transpose(PIR_V)[:, 0]), transpose(transpose(PIR_V)[:, 1]), transpose(transpose(PIR_V)[:, 3]))
P_XY = [
    2.12132, 0, 2.12132, 0.707107, 0, 0.707107;
    1.5, 0, -1.5, 4.74264, 4.24264, 3.74264;
    1, 1, 1, 1, 1, 1
]
# Определяем область проекции пирамиды на картинную плоскость XY ВСК
# Левый верхний угол
XL := min(transpose(P_XY)[:, 0]) = 0
YH := max(transpose(P_XY)[:, 1]) = 4.74264
# Правый нижний угол
XH := max(transpose(P_XY)[:, 0]) = 2.12132
YL := min(transpose(P_XY)[:, 1]) = -1.5
# Координаты в ОСК:
XLW := 200
YLW := 100
XHW := 700
YHW := 500
# Вычисляем параметры для формирования матрицы пересчета координат из плоскости XY ВСК в ОСК
ΔXW := XHW - XLW = 500
ΔX := XH - XL = 2.12132
ΔYW := YHW - YLW = 400
ΔY := YH - YL = 6.24264
KX := ΔXW/ΔX = 235.702
KY := ΔYW/ΔY = 64.0754
# Матрица пересчета из ВСК в ОСК
TSW := [KX, 0, XLW - KX*XL; 0, -KY, YHW + KY*YL; 0, 0, 1]
# Вычисляем координаты вершин пирамиды в ОСК
MW := TSW*P_XY = [
    700, 200, 700, 366.667, 200, 366.667;
    307.774, 403.887, 500, 100, 132.038, 164.075;
    1, 1, 1, 1, 1, 1
]
[XC, XB, XA, XC1, XB1, XA1; YC, YB, YA, YC1, YB1, YA1; Q, Q, Q, Q, Q, Q] := vectorize(round(MW)) = [700, 200, 700, 367, 200, 367; 308, 404, 500, 100, 132, 164; 1, 1, 1, 1, 1, 1]
# Формируем массивы координат X и Y для рисования пирамиды
X := transpose([XC, XB, XA, XC, XC1, XB1, XB, XB1, XA1, XA, XA1, XC1])
Y := transpose([YC, YB, YA, YC, YC1, YB1, YB, YB1, YA1, YA, YA1, YC1])
# Вычисляем декартовы координаты камеры (вектора определяющего положение камеры)
RC := [rV*sin(θV)*cos(ϕV); rV*sin(θV)*sin(ϕV); rV*cos(θV)] = [5; -5; 7.07107]
# График без удаления граней
# [plot: -Y vs X]
# Координаты векторов AC  и AA1 (x,y,z):
AC := [pC[0]; pC[1]; pC[2]] - [pA[0]; pA[1]; pA[2]] = [-3; 3; 0]
AA1 := [pA1[0]; pA1[1]; pA1[2]] - [pA[0]; pA[1]; pA[2]] = [-2; 0; 6]
N_AA1C1C := AC×AA1 = [18; 18; 6]
A1B1 := [pB1[0]; pB1[1]; pB1[2]] - [pA1[0]; pA1[1]; pA1[2]] = [-1; 0; 0]
A1C1 := [pA1[0]; pA1[1]; pA1[2]] - [pC1[0]; pC1[1]; pC1[2]] = [1; -1; 0]
N_A1B1C1 := A1B1×A1C1 = [0; 0; 1]
AB := [pB[0]; pB[1]; pB[2]] - [pA[0]; pA[1]; pA[2]] = [-3; 0; 0]
AC := [pC[0]; pC[1]; pC[2]] - [pA[0]; pA[1]; pA[2]] = [-3; 3; 0]
N_AA1B1B := AA1×AB = [0; -18; 0]
N_ABC := AB×AC = [0; 0; -9]
BB1 := [pB1[0]; pB1[1]; pB1[2]] - [pB[0]; pB[1]; pB[2]] = [0; 0; 6]
BC := [pC[0]; pC[1]; pC[2]] - [pB[0]; pB[1]; pB[2]] = [0; 3; 0]
N_BB1C1C := BB1×BC = [-18; 0; 0]
# Определяем видимость граней пирамиды:
q1 := N_AA1C1C*RC = 42.4264
s1 := if(q1 ≥ 0, "Грань AA1C1C видна", "Грань AA1C1C не видна") = "Грань AA1C1C видна"
q2 := N_AA1B1B*RC = 90
s2 := if(q2 ≥ 0, "Грань AA1B1B видна", "Грань AA1B1B не видна") = "Грань AA1B1B видна"
q3 := N_BB1C1C*RC = -90
s3 := if(q3 ≥ 0, "Грань BB1C1C видна", "Грань BB1C1C не видна") = "Грань BB1C1C не видна"
q4 := N_ABC*RC = -63.6396
s4 := if(q4 ≥ 0, "Грань ABC видна", "Грань ABC не видна") = "Грань ABC не видна"
q5 := N_A1B1C1*RC = 7.07107
s5 := if(q5 ≥ 0, "Грань A1B1C1 видна", "Грань A1B1C1 не видна") = "Грань A1B1C1 видна"
Xs := transpose([XA, XA1, XC1, XC, XA, XA1, XB1, XB, XA, XA1, XB1, XC1])
Ys := transpose([YA, YA1, YC1, YC, YA, YA1, YB1, YB, YA, YA1, YB1, YC1])
# [plot: -Ys vs Xs]
# Задаем положение секущей плоскости в МСК XYZ
# Угол между осью z и вектором нормали к секущей плоскости
ϕGrad := 33
ϕ := ϕGrad/180*π = 0.575959
# Вектор нормали к секущей плоскости
N := transpose([0, sin(ϕ), cos(ϕ)]) = [0; 0.544639; 0.838671]
# Координаты точки пересечения оси Z (ребра BB1) и секущей плоскости
x0 := 0
y0 := 0
z0 := 3/4*PIR[:, 3][2] = 4.5
# Задаем параметры секущей плоскости
D := -(N[0]*x0 + N[1]*y0 + N[2]*z0) = -3.77402
# Находим точку пересечения P1 секущей плоскости с ребром CC1
V1 := pC = [0; 3; 0]
V2 := pC1 = [0; 1; 6]
ΔV := V2 - V1 = [0; -2; 6]
tAD1 := -((N*V1 + D)/(N*ΔV)) = 0.542794
Vad := V1 + ΔV*tAD1 = [0; 1.91441; 3.25677]
# Координаты точки P1
xAD := Vad[0] = 0
yAD := Vad[1] = 1.91441
zAD := Vad[2] = 3.25677
# Находим точку пересечения P1 секущей плоскости с ребром AA1
V1 := pA = [3; 0; 0]
V2 := pA1 = [1; 0; 6]
ΔV := V2 - V1 = [-2; 0; 6]
tCF1 := -((N*V1 + D)/(N*ΔV)) = 0.75
Vcf := V1 + ΔV*tCF1 = [1.5; 0; 4.5]
# Координаты точки P2
xCF := Vcf[0] = 1.5
yCF := Vcf[1] = 0
zCF := Vcf[2] = 4.5
# Находим точку пересечения P1 секущей плоскости с ребром BB1
V1 := pB = [0; 0; 0]
V2 := pB1 = [0; 0; 6]
ΔV := V2 - V1 = [0; 0; 6]
tBE1 := -((N*V1 + D)/(N*ΔV)) = 0.75
Vbe := V1 + ΔV*tBE1 = [0; 0; 4.5]
# Координаты точки P3
xBE := Vbe[0] = 0
yBE := Vbe[1] = 0
zBE := Vbe[2] = 4.5
# Матрица мировых координат точек P1, P2, P3 (сечение)
TR := [xAD, xCF, xBE; yAD, yCF, yBE; zAD, zCF, zBE; 1, 1, 1] = [0, 1.5, 0; 1.91441, 0, 0; 3.25677, 4.5, 4.5; 1, 1, 1]
# Вычисляем координаты вершин треугольника сечения P1, P2, P3 в ВСК
TR_V := Kview*TR = [1.35369, 1.06066, 0; 3.26009, 2.43198, 3.18198; 8.65432, 6.06802, 6.81802; 1, 1, 1]
# Определяем координаты проекции вершин треугольника сечения P1, P2, P3 на картинную плоскость (без координат по оси Z)
TR_XY := stack(transpose(transpose(TR_V)[:, 0]), transpose(transpose(TR_V)[:, 1]), transpose(transpose(TR_V)[:, 3]))
TR_XY = [1.35369, 1.06066, 0; 3.26009, 2.43198, 3.18198; 1, 1, 1]
# Вычисляем оконные координаты вершин треугольника сечения P1, P2, P3
TRW := TSW*TR_XY = [519.069, 450, 200; 194.995, 248.057, 200; 1, 1, 1]
[XP1, XP2, XP3; YP1, YP2, YP3; Q, Q, Q] := vectorize(round(TRW)) = [519, 450, 200; 195, 248, 200; 1, 1, 1]
# Формируем массивы координат X и Y для рисования сечения пирамиды
X_C := transpose([XP1, XP2, XP3, XP1])
Y_C := transpose([YP1, YP2, YP3, YP1])
# График без удаления граней + сечение
# [plot: -Y, -Y_C vs X, X_C]
# Координаты в ОСК:
XLW := 100
YLW := 200
XHW := 800
YHW := 900
# Вычисляем параметры для формирования матрицы пересчета координат из плоскости XY ВСК в ОСК
ΔXW := XHW - XLW = 700
ΔYW := YHW - YLW = 700
KX := ΔXW/ΔX = 329.983
KY := ΔYW/ΔY = 112.132
# Матрица пересчета из ВСК в ОСК
TSW := [KX, 0, XLW - KX*XL; 0, -KY, YHW + KY*YL; 0, 0, 1]
# Вычисляем координаты вершин пирамиды в ОСК
MW := TSW*P_XY = [
    800, 100, 800, 333.333, 100, 333.333;
    563.604, 731.802, 900, 200, 256.066, 312.132;
    1, 1, 1, 1, 1, 1
]
[XC, XB, XA, XC1, XB1, XA1; YC, YB, YA, YC1, YB1, YA1; Q, Q, Q, Q, Q, Q] := vectorize(round(MW)) = [800, 100, 800, 333, 100, 333; 564, 732, 900, 200, 256, 312; 1, 1, 1, 1, 1, 1]
# Формируем массивы координат X и Y для рисования пирамиды
X := transpose([XC, XB, XA, XC, XC1, XB1, XB, XB1, XA1, XA, XA1, XC1])
Y := transpose([YC, YB, YA, YC, YC1, YB1, YB, YB1, YA1, YA, YA1, YC1])
# График без удаления граней
# [plot: -Y vs X]
